// SBML level 3 version 2

model Test()
  // model units - volume: u5

  // Compartments:
  compartment Vessel_1 = 10 u5;

  // Species:
  species $Enzyme in Vessel_1;  // substance in mole
  species $Enzyme_Substrate_Complex in Vessel_1; Enzyme_Substrate_Complex is "Enzyme-Substrate Complex";  // substance in mole
  species Substrate in Vessel_1 = 0;  // substance in u6
  species Product in Vessel_1 = 10;  // substance in u6

  // Parameters:
  K_m has u6;
  kcat has u9;
  E_tot has u6;

  // Rate rules:
  Product' = E_tot*kcat*Substrate/(K_m + Substrate);

  // Unit definitions:
  unit u5 = 1e-3 litre; u5 is "ml";
  unit u6 = 1e-3 mole / litre; u6 is "mmol / l";
  unit u7 = second; u7 is "s";
  unit u8 = kelvin; u8 is "K";
  unit u9 = 1 / second; u9 is "1 / s";
end
